Wed Jan 21 05:30:56 PM UTC 2026
$SIZES PD=100

$PROBLEM Base linear model with oral input

$INPUT ID DV TIME EVID AMT MDV CMT ENC_TIME
$DATA /home/rstudio/git/pharmaai/debug/debug_20261021/20_12_16_2026_01_16_poppk_run/data.csv IGNORE=@

$SUBROUTINES ADVAN2 TRANS2

$ABBR REPLACE ETA_V=ETA(1)
$ABBR REPLACE ETA_CL=ETA(2)
$PK
TVKA = THETA(1)
TVCL = THETA(2)
TVV  = THETA(3)

KA=TVKA
CL = TVCL*EXP(ETA_CL)
V = TVV*EXP(ETA_V)

S2 = V/1000

$ERROR
W = 1
IPRED = F
IF (IPRED.EQ.0) THEN
    IPREDADJ = 2.22500000000000E-16
ELSE
    IPREDADJ = IPRED
END IF
Y = IPRED + EPS(1)*IPREDADJ

$THETA  (0, 0.5) ; POP_KA
$THETA  (0, 6.52)  ; POP_CL
$THETA  (0, 116.0)   ; POP_V
$OMEGA  0.25 ; IIV_V
$OMEGA  0.25 ; IIV_CL
$SIGMA  0.09 ; sigma
$ESTIMATION METHOD=COND INTER MAXEVAL=2000 PRINT=5 POSTHOC NOABORT
$COVARIANCE UNCONDITIONAL PRINT=E PRECOND=1

$TABLE
  ID CL TVKA V
  NOAPPEND NOPRINT
  FILE=patab

$TABLE
  ID TIME DV EVID MDV PRED IPRED CWRES NPDE
  NOAPPEND NOPRINT
  FILE=sdtab

NM-TRAN MESSAGES
 WARNINGS AND ERRORS (IF ANY) FOR PROBLEM    1
 (WARNING  2) NM-TRAN INFERS THAT THE DATA ARE POPULATION.
Note: Analytical 2nd Derivatives are constructed in FSUBS but are never used.
      You may insert $ABBR DERIV2=NO after the first $PROB to save FSUBS construction and compilation time

1NONLINEAR MIXED EFFECTS MODEL PROGRAM (NONMEM) VERSION 7.6.0 (nm760)
 ORIGINALLY DEVELOPED BY STUART BEAL, LEWIS SHEINER, AND ALISON BOECKMANN
 CURRENT DEVELOPERS ARE ROBERT BAUER, ICON DEVELOPMENT SOLUTIONS,
 AND ALISON BOECKMANN. IMPLEMENTATION, EFFICIENCY, AND STANDARDIZATION
 PERFORMED BY NOUS INFOSYSTEMS.
 PROBLEM NO.:         1
 Base linear model with oral input
 TOT. NO. OF OBS RECS:     1222
 TOT. NO. OF INDIVIDUALS:       32
 ONE COMPARTMENT MODEL WITH FIRST-ORDER ABSORPTION (ADVAN2)
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 #TBLN:      1
 #METH: First Order Conditional Estimation with Interaction
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
 #TERM:
0MINIMIZATION SUCCESSFUL
 NO. OF FUNCTION EVALUATIONS USED:      292
 NO. OF SIG. DIGITS IN FINAL EST.:  4.4
0PARAMETER ESTIMATE IS NEAR ITS BOUNDARY

 ETABAR IS THE ARITHMETIC MEAN OF THE ETA-ESTIMATES,
 AND THE P-VALUE IS GIVEN FOR THE NULL HYPOTHESIS THAT THE TRUE MEAN IS 0.

 ETABAR:        -2.2404E-02 -2.1689E+00
 SE:             6.9773E-02  2.7006E-01
 N:                      32          32

 P VAL.:         7.4813E-01  9.7484E-16

 ETASHRINKSD(%)  4.6950E+00  6.1276E+01
 ETASHRINKVR(%)  9.1695E+00  8.5004E+01
 EBVSHRINKSD(%)  2.0278E+00  5.1949E+01
 EBVSHRINKVR(%)  4.0146E+00  7.6911E+01
 RELATIVEINF(%)  9.4946E+01  2.2839E+01
 EPSSHRINKSD(%)  7.9167E-01
 EPSSHRINKVR(%)  1.5771E+00


 TOTAL DATA POINTS NORMALLY DISTRIBUTED (N):         1222
 N*LOG(2PI) CONSTANT TO OBJECTIVE FUNCTION:    2245.8857751522200
 OBJECTIVE FUNCTION VALUE WITHOUT CONSTANT:    5335.9506958023076
 OBJECTIVE FUNCTION VALUE WITH CONSTANT:       7581.8364709545276
 REPORTED OBJECTIVE FUNCTION DOES NOT CONTAIN CONSTANT

 TOTAL EFFECTIVE ETAS (NIND*NETA):                            64


 #TERE:
 Elapsed estimation  time in seconds:     2.36
 TESTING R MATRIX FOR POSITIVE DEFINITNESS
 R MATRIX IS NOT POSITIVE DEFINITE
 PRECONDITIONING CYCLE NO.            1
0S MATRIX ALGORITHMICALLY SINGULAR
0S MATRIX IS OUTPUT
0INVERSE COVARIANCE MATRIX SET TO RS*RMAT, WHERE S* IS A PSEUDO INVERSE OF S
 Elapsed covariance  time in seconds:     1.36
 Elapsed postprocess time in seconds:     0.31

 ********************               FIRST ORDER CONDITIONAL ESTIMATION WITH INTERACTION              ********************
 #OBJT:**************                       MINIMUM VALUE OF OBJECTIVE FUNCTION                      ********************
 #OBJV:********************************************          5335.951       *********************************************

 ********************               FIRST ORDER CONDITIONAL ESTIMATION WITH INTERACTION              ********************
 ********************                             FINAL PARAMETER ESTIMATE                           ********************

 THETA - VECTOR OF FIXED EFFECTS PARAMETERS   *********
         TH 1      TH 2      TH 3
         2.12E+00  6.52E-02  2.20E+02

 OMEGA - COV MATRIX FOR RANDOM EFFECTS - ETAS  ********
         ETA_V     ETA_CL
 ETA_V
+        1.72E-01
 ETA_CL
+        0.00E+00  4.69E+01

 SIGMA - COV MATRIX FOR RANDOM EFFECTS - EPSILONS  ****
         EPS1
 EPS1
+        3.03E-01

 OMEGA - CORR MATRIX FOR RANDOM EFFECTS - ETAS  *******
         ETA_V     ETA_CL
 ETA_V
+        4.15E-01
 ETA_CL
+        0.00E+00  6.85E+00

 SIGMA - CORR MATRIX FOR RANDOM EFFECTS - EPSILONS  ***
         EPS1
 EPS1
+        5.51E-01

 ********************               FIRST ORDER CONDITIONAL ESTIMATION WITH INTERACTION              ********************
 ********************                            STANDARD ERROR OF ESTIMATE                          ********************

 THETA - VECTOR OF FIXED EFFECTS PARAMETERS   *********
         TH 1      TH 2      TH 3
         6.26E-01  0.00E+00  1.88E+01

 OMEGA - COV MATRIX FOR RANDOM EFFECTS - ETAS  ********
         ETA_V     ETA_CL
 ETA_V
+        3.90E-02
 ETA_CL
+       .........  3.58E+01

 SIGMA - COV MATRIX FOR RANDOM EFFECTS - EPSILONS  ****
         EPS1
 EPS1
+        1.75E-02

 OMEGA - CORR MATRIX FOR RANDOM EFFECTS - ETAS  *******
         ETA_V     ETA_CL
 ETA_V
+        4.70E-02
 ETA_CL
+       .........  2.61E+00

 SIGMA - CORR MATRIX FOR RANDOM EFFECTS - EPSILONS  ***
         EPS1
 EPS1
+        1.59E-02

 ********************               FIRST ORDER CONDITIONAL ESTIMATION WITH INTERACTION              ********************
 ********************                          COVARIANCE MATRIX OF ESTIMATE                         ********************

            TH 1      TH 2      TH 3      OM11      OM12      OM22      SG11
 TH 1
+        3.92E-01
 TH 2
+        0.00E+00  0.00E+00
 TH 3
+        6.07E+00  0.00E+00  3.52E+02
 OM11
+        9.01E-03  0.00E+00  1.74E-01  1.52E-03
 OM12
+       ......... ......... ......... ......... .........
 OM22
+       -6.76E+00  0.00E+00 -3.00E+02 -3.09E-01 .........  1.28E+03
 SG11
+        5.03E-03  0.00E+00  1.75E-01  2.37E-04 ......... -2.62E-01  3.06E-04

 ********************               FIRST ORDER CONDITIONAL ESTIMATION WITH INTERACTION              ********************
 ********************                          CORRELATION MATRIX OF ESTIMATE                        ********************

            TH 1      TH 2      TH 3      OM11      OM12      OM22      SG11
 TH 1
+        6.26E-01
 TH 2
+        0.00E+00  0.00E+00
 TH 3
+        5.17E-01  0.00E+00  1.88E+01
 OM11
+        3.69E-01  0.00E+00  2.38E-01  3.90E-02
 OM12
+       ......... ......... ......... ......... .........
 OM22
+       -3.02E-01  0.00E+00 -4.47E-01 -2.21E-01 .........  3.58E+01
 SG11
+        4.60E-01  0.00E+00  5.34E-01  3.47E-01 ......... -4.19E-01  1.75E-02
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
 ********************               FIRST ORDER CONDITIONAL ESTIMATION WITH INTERACTION              ********************
 ********************                      EIGENVALUES OF COR MATRIX OF ESTIMATE                     ********************

             1         2         3         4         5         6
         4.12E-01  5.09E-01  6.68E-01  8.42E-01  1.00E+00  2.57E+00
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 Elapsed finaloutput time in seconds:     0.02
 #CPUT: Total CPU Time in Seconds,        4.081
