Mon Mar 23 08:46:37 PM UTC 2026
$SIZES PD=100

$PROBLEM Base linear model with oral input

$INPUT ID TIME CMT EVID MDV DV AMT GROUP ORIGID WEIGHT HEIGHT ALBUMIN BILIRUBIN CREATININE HEMATOCRIT ENC_TIME
$DATA /home/rstudio/git/pharmaai/pharmr.extra/1/data.csv IGNORE=@

$SUBROUTINES ADVAN2 TRANS2

$ABBR REPLACE ETA_V=ETA(1)
$ABBR REPLACE ETA_CL=ETA(2)
$PK
TVKA = THETA(1)
TVCL = THETA(2)
TVV  = THETA(3)

KA=TVKA
CL = TVCL*EXP(ETA_CL)
V = TVV*EXP(ETA_V)

S2 = V

$ERROR
W = 1
IPRED = F
Y = IPRED + W * EPS(1)

$THETA  (0, 0.5) ; POP_KA
$THETA  (0, 5.41)  ; POP_CL
$THETA  (0, 153.0)   ; POP_V
$OMEGA  0.04 ; IIV_V
$OMEGA  0.04 ; IIV_CL
$SIGMA  0.5 ; RUV_ADD

$ESTIMATION METHOD=COND INTER MAXEVAL=2000 PRINT=5
$COVARIANCE UNCONDITIONAL PRINT=E PRECOND=1  SIRSAMPLE=500 SIRNITER=10
$TABLE
  ID TIME DV EVID MDV IPRED PRED CWRES CIWRES NPDE

 NOAPPEND NOPRINT FILE=sdtab

NM-TRAN MESSAGES
 WARNINGS AND ERRORS (IF ANY) FOR PROBLEM    1
 (WARNING  2) NM-TRAN INFERS THAT THE DATA ARE POPULATION.
Note: Analytical 2nd Derivatives are constructed in FSUBS but are never used.
      You may insert $ABBR DERIV2=NO after the first $PROB to save FSUBS construction and compilation time

1NONLINEAR MIXED EFFECTS MODEL PROGRAM (NONMEM) VERSION 7.6.0 (nm760)
 ORIGINALLY DEVELOPED BY STUART BEAL, LEWIS SHEINER, AND ALISON BOECKMANN
 CURRENT DEVELOPERS ARE ROBERT BAUER, ICON DEVELOPMENT SOLUTIONS,
 AND ALISON BOECKMANN. IMPLEMENTATION, EFFICIENCY, AND STANDARDIZATION
 PERFORMED BY NOUS INFOSYSTEMS.
 PROBLEM NO.:         1
 Base linear model with oral input
 TOT. NO. OF OBS RECS:     2184
 TOT. NO. OF INDIVIDUALS:      168
 ONE COMPARTMENT MODEL WITH FIRST-ORDER ABSORPTION (ADVAN2)
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 #TBLN:      1
 #METH: First Order Conditional Estimation with Interaction
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
 #TERM:
0MINIMIZATION SUCCESSFUL
 NO. OF FUNCTION EVALUATIONS USED:      207
 NO. OF SIG. DIGITS IN FINAL EST.:  3.8

 ETABAR IS THE ARITHMETIC MEAN OF THE ETA-ESTIMATES,
 AND THE P-VALUE IS GIVEN FOR THE NULL HYPOTHESIS THAT THE TRUE MEAN IS 0.

 ETABAR:        -6.0536E-03 -2.7310E-03
 SE:             3.7747E-02  2.7245E-02
 N:                     168         168

 P VAL.:         8.7259E-01  9.2015E-01

 ETASHRINKSD(%)  1.8440E+00  4.5339E+00
 ETASHRINKVR(%)  3.6539E+00  8.8622E+00
 EBVSHRINKSD(%)  1.1937E+00  4.2310E+00
 EBVSHRINKVR(%)  2.3732E+00  8.2831E+00
 RELATIVEINF(%)  9.7610E+01  9.1701E+01
 EPSSHRINKSD(%)  7.4925E+00
 EPSSHRINKVR(%)  1.4424E+01


 TOTAL DATA POINTS NORMALLY DISTRIBUTED (N):         2184
 N*LOG(2PI) CONSTANT TO OBJECTIVE FUNCTION:    4013.9235130380102
 OBJECTIVE FUNCTION VALUE WITHOUT CONSTANT:   -457.53948039169308
 OBJECTIVE FUNCTION VALUE WITH CONSTANT:       3556.3840326463173
 REPORTED OBJECTIVE FUNCTION DOES NOT CONTAIN CONSTANT

 TOTAL EFFECTIVE ETAS (NIND*NETA):                           336


 #TERE:
 Elapsed estimation  time in seconds:     1.54
 TESTING R MATRIX FOR POSITIVE DEFINITNESS
 R MATRIX IS POSITIVE DEFINITE
 Elapsed covariance  time in seconds:     0.76
 Elapsed postprocess time in seconds:     0.30

 ********************               FIRST ORDER CONDITIONAL ESTIMATION WITH INTERACTION              ********************
 #OBJT:**************                       MINIMUM VALUE OF OBJECTIVE FUNCTION                      ********************
 #OBJV:********************************************          -457.539       *********************************************

 ********************               FIRST ORDER CONDITIONAL ESTIMATION WITH INTERACTION              ********************
 ********************                             FINAL PARAMETER ESTIMATE                           ********************

 THETA - VECTOR OF FIXED EFFECTS PARAMETERS   *********
         TH 1      TH 2      TH 3
         4.73E-01  1.09E+01  9.26E+01

 OMEGA - COV MATRIX FOR RANDOM EFFECTS - ETAS  ********
         ETA_V     ETA_CL
 ETA_V
+        2.48E-01
 ETA_CL
+        0.00E+00  1.37E-01

 SIGMA - COV MATRIX FOR RANDOM EFFECTS - EPSILONS  ****
         EPS1
 EPS1
+        1.72E-01

 OMEGA - CORR MATRIX FOR RANDOM EFFECTS - ETAS  *******
         ETA_V     ETA_CL
 ETA_V
+        4.98E-01
 ETA_CL
+        0.00E+00  3.70E-01

 SIGMA - CORR MATRIX FOR RANDOM EFFECTS - EPSILONS  ***
         EPS1
 EPS1
+        4.15E-01

 ********************               FIRST ORDER CONDITIONAL ESTIMATION WITH INTERACTION              ********************
 ********************                            STANDARD ERROR OF ESTIMATE                          ********************

 THETA - VECTOR OF FIXED EFFECTS PARAMETERS   *********
         TH 1      TH 2      TH 3
         2.21E-02  3.30E-01  3.37E+00

 OMEGA - COV MATRIX FOR RANDOM EFFECTS - ETAS  ********
         ETA_V     ETA_CL
 ETA_V
+        2.46E-02
 ETA_CL
+       .........  1.45E-02

 SIGMA - COV MATRIX FOR RANDOM EFFECTS - EPSILONS  ****
         EPS1
 EPS1
+        1.90E-02

 OMEGA - CORR MATRIX FOR RANDOM EFFECTS - ETAS  *******
         ETA_V     ETA_CL
 ETA_V
+        2.47E-02
 ETA_CL
+       .........  1.96E-02

 SIGMA - CORR MATRIX FOR RANDOM EFFECTS - EPSILONS  ***
         EPS1
 EPS1
+        2.29E-02

 ********************               FIRST ORDER CONDITIONAL ESTIMATION WITH INTERACTION              ********************
 ********************                          COVARIANCE MATRIX OF ESTIMATE                         ********************

            TH 1      TH 2      TH 3      OM11      OM12      OM22      SG11
 TH 1
+        4.87E-04
 TH 2
+       -1.61E-03  1.09E-01
 TH 3
+        2.39E-02 -5.43E-02  1.13E+01
 OM11
+       -1.93E-05  4.50E-04  3.90E-03  6.05E-04
 OM12
+       ......... ......... ......... ......... .........
 OM22
+       -3.55E-05  1.53E-04  3.63E-03 -3.61E-05 .........  2.10E-04
 SG11
+        7.78E-05 -1.74E-03 -2.17E-02  6.71E-05 ......... -3.90E-05  3.60E-04

 ********************               FIRST ORDER CONDITIONAL ESTIMATION WITH INTERACTION              ********************
 ********************                          CORRELATION MATRIX OF ESTIMATE                        ********************

            TH 1      TH 2      TH 3      OM11      OM12      OM22      SG11
 TH 1
+        2.21E-02
 TH 2
+       -2.21E-01  3.30E-01
 TH 3
+        3.21E-01 -4.88E-02  3.37E+00
 OM11
+       -3.56E-02  5.53E-02  4.71E-02  2.46E-02
 OM12
+       ......... ......... ......... ......... .........
 OM22
+       -1.11E-01  3.20E-02  7.46E-02 -1.01E-01 .........  1.45E-02
 SG11
+        1.86E-01 -2.78E-01 -3.40E-01  1.44E-01 ......... -1.42E-01  1.90E-02
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
 ********************               FIRST ORDER CONDITIONAL ESTIMATION WITH INTERACTION              ********************
 ********************                      EIGENVALUES OF COR MATRIX OF ESTIMATE                     ********************

             1         2         3         4         5         6
         3.84E-01  7.03E-01  9.05E-01  1.09E+00  1.40E+00  1.52E+00
 Elapsed finaloutput time in seconds:     0.02
 #TBLN:      2
 #METH: Importance Sampling of Variance-Covariance (SIR)

 #TERM:
 STATISTICAL PORTION WAS COMPLETED

 TOTAL DATA POINTS NORMALLY DISTRIBUTED (N):         2184
 N*LOG(2PI) CONSTANT TO OBJECTIVE FUNCTION:    4013.9235130380102
 OBJECTIVE FUNCTION VALUE WITHOUT CONSTANT:   -451.67524701817143
 OBJECTIVE FUNCTION VALUE WITH CONSTANT:       3562.2482660198389
 REPORTED OBJECTIVE FUNCTION DOES NOT CONTAIN CONSTANT

 TOTAL EFFECTIVE ETAS (NIND*NETA):                           336
 NIND*NETA*LOG(2PI) CONSTANT TO OBJECTIVE FUNCTION:    617.52669431354002
 OBJECTIVE FUNCTION VALUE WITHOUT CONSTANT:   -451.67524701817143
 OBJECTIVE FUNCTION VALUE WITH CONSTANT:       165.85144729536859
 REPORTED OBJECTIVE FUNCTION DOES NOT CONTAIN CONSTANT


 #TERE:
 Elapsed estimation  time in seconds:     9.55
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 #OBJV:********************************************          -451.675       *********************************************
 #OBJS:********************************************             2.936 (STD) *********************************************

 ********************                 IMPORTANCE SAMPLING OF VARIANCE-COVARIANCE (SIR)               ********************
 ********************                             FINAL PARAMETER ESTIMATE                           ********************

 THETA - VECTOR OF FIXED EFFECTS PARAMETERS   *********
         TH 1      TH 2      TH 3
         4.73E-01  1.09E+01  9.35E+01

 OMEGA - COV MATRIX FOR RANDOM EFFECTS - ETAS  ********
         ETA_V     ETA_CL
 ETA_V
+        2.53E-01
 ETA_CL
+        0.00E+00  1.43E-01

 SIGMA - COV MATRIX FOR RANDOM EFFECTS - EPSILONS  ****
         EPS1
 EPS1
+        1.72E-01

 OMEGA - CORR MATRIX FOR RANDOM EFFECTS - ETAS  *******
         ETA_V     ETA_CL
 ETA_V
+        5.02E-01
 ETA_CL
+        0.00E+00  3.77E-01

 SIGMA - CORR MATRIX FOR RANDOM EFFECTS - EPSILONS  ***
         EPS1
 EPS1
+        4.15E-01

 ********************                 IMPORTANCE SAMPLING OF VARIANCE-COVARIANCE (SIR)               ********************
 ********************                STANDARD ERROR OF ESTIMATE (From Sample Variance)               ********************

 THETA - VECTOR OF FIXED EFFECTS PARAMETERS   *********
         TH 1      TH 2      TH 3
         9.41E-03  3.16E-01  3.81E+00

 OMEGA - COV MATRIX FOR RANDOM EFFECTS - ETAS  ********
         ETA_V     ETA_CL
 ETA_V
+        2.64E-02
 ETA_CL
+        0.00E+00  1.82E-02

 SIGMA - COV MATRIX FOR RANDOM EFFECTS - EPSILONS  ****
         EPS1
 EPS1
+        5.46E-03

 OMEGA - CORR MATRIX FOR RANDOM EFFECTS - ETAS  *******
         ETA_V     ETA_CL
 ETA_V
+        2.63E-02
 ETA_CL
+        0.00E+00  2.41E-02

 SIGMA - CORR MATRIX FOR RANDOM EFFECTS - EPSILONS  ***
         EPS1
 EPS1
+        6.58E-03

 ********************                 IMPORTANCE SAMPLING OF VARIANCE-COVARIANCE (SIR)               ********************
 ********************               COVARIANCE MATRIX OF ESTIMATE (From Sample Variance)             ********************

            TH 1      TH 2      TH 3      OM11      OM12      OM22      SG11
 TH 1
+        8.86E-05
 TH 2
+       -9.25E-05  9.98E-02
 TH 3
+        9.74E-03  3.77E-02  1.45E+01
 OM11
+       -5.05E-05  3.84E-04 -1.26E-03  6.99E-04
 OM12
+       ......... ......... ......... ......... .........
 OM22
+        1.01E-05 -2.36E-04  3.67E-03 -2.58E-05  0.00E+00  3.32E-04
 SG11
+        2.72E-06 -1.51E-04  6.62E-04  2.18E-05  0.00E+00 -1.88E-05  2.99E-05

 ********************                 IMPORTANCE SAMPLING OF VARIANCE-COVARIANCE (SIR)               ********************
 ********************              CORRELATION MATRIX OF ESTIMATE (From Sample Variance)             ********************

            TH 1      TH 2      TH 3      OM11      OM12      OM22      SG11
 TH 1
+        9.41E-03
 TH 2
+       -3.11E-02  3.16E-01
 TH 3
+        2.72E-01  3.13E-02  3.81E+00
 OM11
+       -2.03E-01  4.60E-02 -1.25E-02  2.64E-02
 OM12
+       ......... ......... ......... ......... .........
 OM22
+        5.91E-02 -4.10E-02  5.29E-02 -5.35E-02  0.00E+00  1.82E-02
 SG11
+        5.28E-02 -8.75E-02  3.18E-02  1.51E-01  0.00E+00 -1.89E-01  5.46E-03
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
 ********************                 IMPORTANCE SAMPLING OF VARIANCE-COVARIANCE (SIR)               ********************
 ********************           EIGENVALUES OF COR MATRIX OF ESTIMATE (From Sample Variance)         ********************

             1         2         3         4         5         6
         6.36E-01  7.43E-01  9.65E-01  1.05E+00  1.22E+00  1.38E+00
 #TBLN:      3
 #METH: Importance Sampling of Variance-Covariance (SIR)

 #TERM:
 STATISTICAL PORTION WAS COMPLETED

 TOTAL DATA POINTS NORMALLY DISTRIBUTED (N):         2184
 N*LOG(2PI) CONSTANT TO OBJECTIVE FUNCTION:    4013.9235130380102
 OBJECTIVE FUNCTION VALUE WITHOUT CONSTANT:   -451.66690238430340
 OBJECTIVE FUNCTION VALUE WITH CONSTANT:       3562.2566106537070
 REPORTED OBJECTIVE FUNCTION DOES NOT CONTAIN CONSTANT

 TOTAL EFFECTIVE ETAS (NIND*NETA):                           336
 NIND*NETA*LOG(2PI) CONSTANT TO OBJECTIVE FUNCTION:    617.52669431354002
 OBJECTIVE FUNCTION VALUE WITHOUT CONSTANT:   -451.66690238430340
 OBJECTIVE FUNCTION VALUE WITH CONSTANT:       165.85979192923662
 REPORTED OBJECTIVE FUNCTION DOES NOT CONTAIN CONSTANT


 #TERE:
 Elapsed estimation  time in seconds:     6.05
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 #OBJV:********************************************          -451.667       *********************************************
 #OBJS:********************************************             3.391 (STD) *********************************************

 ********************                 IMPORTANCE SAMPLING OF VARIANCE-COVARIANCE (SIR)               ********************
 ********************                             FINAL PARAMETER ESTIMATE                           ********************

 THETA - VECTOR OF FIXED EFFECTS PARAMETERS   *********
         TH 1      TH 2      TH 3
         4.73E-01  1.09E+01  9.29E+01

 OMEGA - COV MATRIX FOR RANDOM EFFECTS - ETAS  ********
         ETA_V     ETA_CL
 ETA_V
+        2.52E-01
 ETA_CL
+        0.00E+00  1.39E-01

 SIGMA - COV MATRIX FOR RANDOM EFFECTS - EPSILONS  ****
         EPS1
 EPS1
+        1.72E-01

 OMEGA - CORR MATRIX FOR RANDOM EFFECTS - ETAS  *******
         ETA_V     ETA_CL
 ETA_V
+        5.02E-01
 ETA_CL
+        0.00E+00  3.72E-01

 SIGMA - CORR MATRIX FOR RANDOM EFFECTS - EPSILONS  ***
         EPS1
 EPS1
+        4.14E-01

 ********************                 IMPORTANCE SAMPLING OF VARIANCE-COVARIANCE (SIR)               ********************
 ********************                STANDARD ERROR OF ESTIMATE (From Sample Variance)               ********************

 THETA - VECTOR OF FIXED EFFECTS PARAMETERS   *********
         TH 1      TH 2      TH 3
         9.37E-03  3.46E-01  3.77E+00

 OMEGA - COV MATRIX FOR RANDOM EFFECTS - ETAS  ********
         ETA_V     ETA_CL
 ETA_V
+        2.82E-02
 ETA_CL
+        0.00E+00  1.67E-02

 SIGMA - COV MATRIX FOR RANDOM EFFECTS - EPSILONS  ****
         EPS1
 EPS1
+        5.45E-03

 OMEGA - CORR MATRIX FOR RANDOM EFFECTS - ETAS  *******
         ETA_V     ETA_CL
 ETA_V
+        2.80E-02
 ETA_CL
+        0.00E+00  2.22E-02

 SIGMA - CORR MATRIX FOR RANDOM EFFECTS - EPSILONS  ***
         EPS1
 EPS1
+        6.57E-03

 ********************                 IMPORTANCE SAMPLING OF VARIANCE-COVARIANCE (SIR)               ********************
 ********************               COVARIANCE MATRIX OF ESTIMATE (From Sample Variance)             ********************

            TH 1      TH 2      TH 3      OM11      OM12      OM22      SG11
 TH 1
+        8.78E-05
 TH 2
+       -3.48E-04  1.20E-01
 TH 3
+        1.20E-02 -6.96E-02  1.42E+01
 OM11
+       -2.13E-05  1.50E-04 -7.77E-03  7.94E-04
 OM12
+       ......... ......... ......... ......... .........
 OM22
+        6.08E-06  8.33E-05  1.27E-03 -7.11E-05  0.00E+00  2.79E-04
 SG11
+        2.79E-06  5.38E-05  1.46E-04 -1.58E-06  0.00E+00 -5.42E-06  2.97E-05

 ********************                 IMPORTANCE SAMPLING OF VARIANCE-COVARIANCE (SIR)               ********************
 ********************              CORRELATION MATRIX OF ESTIMATE (From Sample Variance)             ********************

            TH 1      TH 2      TH 3      OM11      OM12      OM22      SG11
 TH 1
+        9.37E-03
 TH 2
+       -1.07E-01  3.46E-01
 TH 3
+        3.39E-01 -5.33E-02  3.77E+00
 OM11
+       -8.09E-02  1.54E-02 -7.31E-02  2.82E-02
 OM12
+       ......... ......... ......... ......... .........
 OM22
+        3.88E-02  1.44E-02  2.01E-02 -1.51E-01  0.00E+00  1.67E-02
 SG11
+        5.46E-02  2.85E-02  7.12E-03 -1.03E-02  0.00E+00 -5.96E-02  5.45E-03
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
 ********************                 IMPORTANCE SAMPLING OF VARIANCE-COVARIANCE (SIR)               ********************
 ********************           EIGENVALUES OF COR MATRIX OF ESTIMATE (From Sample Variance)         ********************

             1         2         3         4         5         6
         6.51E-01  8.31E-01  9.42E-01  1.03E+00  1.13E+00  1.42E+00
 #TBLN:      4
 #METH: Importance Sampling of Variance-Covariance (SIR)

 #TERM:
 STATISTICAL PORTION WAS COMPLETED

 TOTAL DATA POINTS NORMALLY DISTRIBUTED (N):         2184
 N*LOG(2PI) CONSTANT TO OBJECTIVE FUNCTION:    4013.9235130380102
 OBJECTIVE FUNCTION VALUE WITHOUT CONSTANT:   -451.57872093154032
 OBJECTIVE FUNCTION VALUE WITH CONSTANT:       3562.3447921064699
 REPORTED OBJECTIVE FUNCTION DOES NOT CONTAIN CONSTANT

 TOTAL EFFECTIVE ETAS (NIND*NETA):                           336
 NIND*NETA*LOG(2PI) CONSTANT TO OBJECTIVE FUNCTION:    617.52669431354002
 OBJECTIVE FUNCTION VALUE WITHOUT CONSTANT:   -451.57872093154032
 OBJECTIVE FUNCTION VALUE WITH CONSTANT:       165.94797338199970
 REPORTED OBJECTIVE FUNCTION DOES NOT CONTAIN CONSTANT


 #TERE:
 Elapsed estimation  time in seconds:     6.06
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 #OBJV:********************************************          -451.579       *********************************************
 #OBJS:********************************************             3.548 (STD) *********************************************

 ********************                 IMPORTANCE SAMPLING OF VARIANCE-COVARIANCE (SIR)               ********************
 ********************                             FINAL PARAMETER ESTIMATE                           ********************

 THETA - VECTOR OF FIXED EFFECTS PARAMETERS   *********
         TH 1      TH 2      TH 3
         4.72E-01  1.09E+01  9.24E+01

 OMEGA - COV MATRIX FOR RANDOM EFFECTS - ETAS  ********
         ETA_V     ETA_CL
 ETA_V
+        2.54E-01
 ETA_CL
+        0.00E+00  1.40E-01

 SIGMA - COV MATRIX FOR RANDOM EFFECTS - EPSILONS  ****
         EPS1
 EPS1
+        1.73E-01

 OMEGA - CORR MATRIX FOR RANDOM EFFECTS - ETAS  *******
         ETA_V     ETA_CL
 ETA_V
+        5.03E-01
 ETA_CL
+        0.00E+00  3.74E-01

 SIGMA - CORR MATRIX FOR RANDOM EFFECTS - EPSILONS  ***
         EPS1
 EPS1
+        4.15E-01

 ********************                 IMPORTANCE SAMPLING OF VARIANCE-COVARIANCE (SIR)               ********************
 ********************                STANDARD ERROR OF ESTIMATE (From Sample Variance)               ********************

 THETA - VECTOR OF FIXED EFFECTS PARAMETERS   *********
         TH 1      TH 2      TH 3
         9.51E-03  3.30E-01  3.81E+00

 OMEGA - COV MATRIX FOR RANDOM EFFECTS - ETAS  ********
         ETA_V     ETA_CL
 ETA_V
+        2.68E-02
 ETA_CL
+        0.00E+00  1.83E-02

 SIGMA - COV MATRIX FOR RANDOM EFFECTS - EPSILONS  ****
         EPS1
 EPS1
+        5.73E-03

 OMEGA - CORR MATRIX FOR RANDOM EFFECTS - ETAS  *******
         ETA_V     ETA_CL
 ETA_V
+        2.65E-02
 ETA_CL
+        0.00E+00  2.43E-02

 SIGMA - CORR MATRIX FOR RANDOM EFFECTS - EPSILONS  ***
         EPS1
 EPS1
+        6.89E-03

 ********************                 IMPORTANCE SAMPLING OF VARIANCE-COVARIANCE (SIR)               ********************
 ********************               COVARIANCE MATRIX OF ESTIMATE (From Sample Variance)             ********************

            TH 1      TH 2      TH 3      OM11      OM12      OM22      SG11
 TH 1
+        9.04E-05
 TH 2
+       -7.89E-04  1.09E-01
 TH 3
+        1.23E-02 -8.59E-02  1.46E+01
 OM11
+       -7.99E-06  1.84E-04 -5.87E-03  7.20E-04
 OM12
+       ......... ......... ......... ......... .........
 OM22
+        1.99E-05 -1.21E-04 -4.89E-04 -3.94E-05  0.00E+00  3.35E-04
 SG11
+        3.27E-06  4.91E-06  8.41E-04 -1.47E-05  0.00E+00 -6.54E-06  3.28E-05

 ********************                 IMPORTANCE SAMPLING OF VARIANCE-COVARIANCE (SIR)               ********************
 ********************              CORRELATION MATRIX OF ESTIMATE (From Sample Variance)             ********************

            TH 1      TH 2      TH 3      OM11      OM12      OM22      SG11
 TH 1
+        9.51E-03
 TH 2
+       -2.52E-01  3.30E-01
 TH 3
+        3.39E-01 -6.83E-02  3.81E+00
 OM11
+       -3.13E-02  2.08E-02 -5.73E-02  2.68E-02
 OM12
+       ......... ......... ......... ......... .........
 OM22
+        1.14E-01 -2.00E-02 -7.01E-03 -8.03E-02  0.00E+00  1.83E-02
 SG11
+        5.99E-02  2.60E-03  3.85E-02 -9.54E-02  0.00E+00 -6.24E-02  5.73E-03
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
 ********************                 IMPORTANCE SAMPLING OF VARIANCE-COVARIANCE (SIR)               ********************
 ********************           EIGENVALUES OF COR MATRIX OF ESTIMATE (From Sample Variance)         ********************

             1         2         3         4         5         6
         5.85E-01  8.55E-01  9.26E-01  1.06E+00  1.08E+00  1.49E+00
 #TBLN:      5
 #METH: Importance Sampling of Variance-Covariance (SIR)

 #TERM:
 STATISTICAL PORTION WAS COMPLETED

 TOTAL DATA POINTS NORMALLY DISTRIBUTED (N):         2184
 N*LOG(2PI) CONSTANT TO OBJECTIVE FUNCTION:    4013.9235130380102
 OBJECTIVE FUNCTION VALUE WITHOUT CONSTANT:   -451.33868258004998
 OBJECTIVE FUNCTION VALUE WITH CONSTANT:       3562.5848304579604
 REPORTED OBJECTIVE FUNCTION DOES NOT CONTAIN CONSTANT

 TOTAL EFFECTIVE ETAS (NIND*NETA):                           336
 NIND*NETA*LOG(2PI) CONSTANT TO OBJECTIVE FUNCTION:    617.52669431354002
 OBJECTIVE FUNCTION VALUE WITHOUT CONSTANT:   -451.33868258004998
 OBJECTIVE FUNCTION VALUE WITH CONSTANT:       166.18801173349004
 REPORTED OBJECTIVE FUNCTION DOES NOT CONTAIN CONSTANT


 #TERE:
 Elapsed estimation  time in seconds:     6.09
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 #OBJV:********************************************          -451.339       *********************************************
 #OBJS:********************************************             3.644 (STD) *********************************************

 ********************                 IMPORTANCE SAMPLING OF VARIANCE-COVARIANCE (SIR)               ********************
 ********************                             FINAL PARAMETER ESTIMATE                           ********************

 THETA - VECTOR OF FIXED EFFECTS PARAMETERS   *********
         TH 1      TH 2      TH 3
         4.73E-01  1.09E+01  9.27E+01

 OMEGA - COV MATRIX FOR RANDOM EFFECTS - ETAS  ********
         ETA_V     ETA_CL
 ETA_V
+        2.57E-01
 ETA_CL
+        0.00E+00  1.41E-01

 SIGMA - COV MATRIX FOR RANDOM EFFECTS - EPSILONS  ****
         EPS1
 EPS1
+        1.72E-01

 OMEGA - CORR MATRIX FOR RANDOM EFFECTS - ETAS  *******
         ETA_V     ETA_CL
 ETA_V
+        5.06E-01
 ETA_CL
+        0.00E+00  3.75E-01

 SIGMA - CORR MATRIX FOR RANDOM EFFECTS - EPSILONS  ***
         EPS1
 EPS1
+        4.15E-01

 ********************                 IMPORTANCE SAMPLING OF VARIANCE-COVARIANCE (SIR)               ********************
 ********************                STANDARD ERROR OF ESTIMATE (From Sample Variance)               ********************

 THETA - VECTOR OF FIXED EFFECTS PARAMETERS   *********
         TH 1      TH 2      TH 3
         1.04E-02  3.60E-01  3.75E+00

 OMEGA - COV MATRIX FOR RANDOM EFFECTS - ETAS  ********
         ETA_V     ETA_CL
 ETA_V
+        2.82E-02
 ETA_CL
+        0.00E+00  1.77E-02

 SIGMA - COV MATRIX FOR RANDOM EFFECTS - EPSILONS  ****
         EPS1
 EPS1
+        5.69E-03

 OMEGA - CORR MATRIX FOR RANDOM EFFECTS - ETAS  *******
         ETA_V     ETA_CL
 ETA_V
+        2.77E-02
 ETA_CL
+        0.00E+00  2.34E-02

 SIGMA - CORR MATRIX FOR RANDOM EFFECTS - EPSILONS  ***
         EPS1
 EPS1
+        6.86E-03

 ********************                 IMPORTANCE SAMPLING OF VARIANCE-COVARIANCE (SIR)               ********************
 ********************               COVARIANCE MATRIX OF ESTIMATE (From Sample Variance)             ********************

            TH 1      TH 2      TH 3      OM11      OM12      OM22      SG11
 TH 1
+        1.08E-04
 TH 2
+       -7.33E-04  1.30E-01
 TH 3
+        1.60E-02 -1.58E-01  1.41E+01
 OM11
+       -3.44E-05 -4.78E-05  4.34E-03  7.96E-04
 OM12
+       ......... ......... ......... ......... .........
 OM22
+        9.86E-06 -6.14E-04  3.16E-03  2.39E-05  0.00E+00  3.15E-04
 SG11
+        3.13E-06  6.79E-05  1.55E-03  3.06E-06  0.00E+00 -1.78E-06  3.24E-05

 ********************                 IMPORTANCE SAMPLING OF VARIANCE-COVARIANCE (SIR)               ********************
 ********************              CORRELATION MATRIX OF ESTIMATE (From Sample Variance)             ********************

            TH 1      TH 2      TH 3      OM11      OM12      OM22      SG11
 TH 1
+        1.04E-02
 TH 2
+       -1.96E-01  3.60E-01
 TH 3
+        4.11E-01 -1.17E-01  3.75E+00
 OM11
+       -1.17E-01 -4.70E-03  4.10E-02  2.82E-02
 OM12
+       ......... ......... ......... ......... .........
 OM22
+        5.34E-02 -9.60E-02  4.75E-02  4.77E-02  0.00E+00  1.77E-02
 SG11
+        5.29E-02  3.31E-02  7.26E-02  1.91E-02  0.00E+00 -1.76E-02  5.69E-03
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
 ********************                 IMPORTANCE SAMPLING OF VARIANCE-COVARIANCE (SIR)               ********************
 ********************           EIGENVALUES OF COR MATRIX OF ESTIMATE (From Sample Variance)         ********************

             1         2         3         4         5         6
         5.51E-01  8.61E-01  9.22E-01  1.05E+00  1.08E+00  1.54E+00
 #TBLN:      6
 #METH: Importance Sampling of Variance-Covariance (SIR)

 #TERM:
 STATISTICAL PORTION WAS COMPLETED

 TOTAL DATA POINTS NORMALLY DISTRIBUTED (N):         2184
 N*LOG(2PI) CONSTANT TO OBJECTIVE FUNCTION:    4013.9235130380102
 OBJECTIVE FUNCTION VALUE WITHOUT CONSTANT:   -451.68993026925227
 OBJECTIVE FUNCTION VALUE WITH CONSTANT:       3562.2335827687580
 REPORTED OBJECTIVE FUNCTION DOES NOT CONTAIN CONSTANT

 TOTAL EFFECTIVE ETAS (NIND*NETA):                           336
 NIND*NETA*LOG(2PI) CONSTANT TO OBJECTIVE FUNCTION:    617.52669431354002
 OBJECTIVE FUNCTION VALUE WITHOUT CONSTANT:   -451.68993026925227
 OBJECTIVE FUNCTION VALUE WITH CONSTANT:       165.83676404428775
 REPORTED OBJECTIVE FUNCTION DOES NOT CONTAIN CONSTANT


 #TERE:
 Elapsed estimation  time in seconds:     6.09
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 #OBJV:********************************************          -451.690       *********************************************
 #OBJS:********************************************             3.668 (STD) *********************************************

 ********************                 IMPORTANCE SAMPLING OF VARIANCE-COVARIANCE (SIR)               ********************
 ********************                             FINAL PARAMETER ESTIMATE                           ********************

 THETA - VECTOR OF FIXED EFFECTS PARAMETERS   *********
         TH 1      TH 2      TH 3
         4.73E-01  1.09E+01  9.28E+01

 OMEGA - COV MATRIX FOR RANDOM EFFECTS - ETAS  ********
         ETA_V     ETA_CL
 ETA_V
+        2.56E-01
 ETA_CL
+        0.00E+00  1.40E-01

 SIGMA - COV MATRIX FOR RANDOM EFFECTS - EPSILONS  ****
         EPS1
 EPS1
+        1.72E-01

 OMEGA - CORR MATRIX FOR RANDOM EFFECTS - ETAS  *******
         ETA_V     ETA_CL
 ETA_V
+        5.06E-01
 ETA_CL
+        0.00E+00  3.74E-01

 SIGMA - CORR MATRIX FOR RANDOM EFFECTS - EPSILONS  ***
         EPS1
 EPS1
+        4.15E-01

 ********************                 IMPORTANCE SAMPLING OF VARIANCE-COVARIANCE (SIR)               ********************
 ********************                STANDARD ERROR OF ESTIMATE (From Sample Variance)               ********************

 THETA - VECTOR OF FIXED EFFECTS PARAMETERS   *********
         TH 1      TH 2      TH 3
         9.48E-03  3.35E-01  3.75E+00

 OMEGA - COV MATRIX FOR RANDOM EFFECTS - ETAS  ********
         ETA_V     ETA_CL
 ETA_V
+        2.73E-02
 ETA_CL
+        0.00E+00  1.68E-02

 SIGMA - COV MATRIX FOR RANDOM EFFECTS - EPSILONS  ****
         EPS1
 EPS1
+        5.74E-03

 OMEGA - CORR MATRIX FOR RANDOM EFFECTS - ETAS  *******
         ETA_V     ETA_CL
 ETA_V
+        2.69E-02
 ETA_CL
+        0.00E+00  2.24E-02

 SIGMA - CORR MATRIX FOR RANDOM EFFECTS - EPSILONS  ***
         EPS1
 EPS1
+        6.92E-03

 ********************                 IMPORTANCE SAMPLING OF VARIANCE-COVARIANCE (SIR)               ********************
 ********************               COVARIANCE MATRIX OF ESTIMATE (From Sample Variance)             ********************

            TH 1      TH 2      TH 3      OM11      OM12      OM22      SG11
 TH 1
+        8.99E-05
 TH 2
+       -1.82E-04  1.12E-01
 TH 3
+        1.21E-02 -4.86E-02  1.41E+01
 OM11
+       -2.65E-05 -4.52E-04  3.08E-03  7.44E-04
 OM12
+       ......... ......... ......... ......... .........
 OM22
+        1.55E-05  6.36E-06  8.80E-04  1.11E-05  0.00E+00  2.83E-04
 SG11
+        3.86E-06  1.26E-04 -8.32E-04 -2.78E-06  0.00E+00 -5.32E-06  3.30E-05

 ********************                 IMPORTANCE SAMPLING OF VARIANCE-COVARIANCE (SIR)               ********************
 ********************              CORRELATION MATRIX OF ESTIMATE (From Sample Variance)             ********************

            TH 1      TH 2      TH 3      OM11      OM12      OM22      SG11
 TH 1
+        9.48E-03
 TH 2
+       -5.73E-02  3.35E-01
 TH 3
+        3.40E-01 -3.87E-02  3.75E+00
 OM11
+       -1.03E-01 -4.96E-02  3.01E-02  2.73E-02
 OM12
+       ......... ......... ......... ......... .........
 OM22
+        9.73E-02  1.13E-03  1.39E-02  2.41E-02  0.00E+00  1.68E-02
 SG11
+        7.09E-02  6.57E-02 -3.87E-02 -1.78E-02  0.00E+00 -5.50E-02  5.74E-03
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
 ********************                 IMPORTANCE SAMPLING OF VARIANCE-COVARIANCE (SIR)               ********************
 ********************           EIGENVALUES OF COR MATRIX OF ESTIMATE (From Sample Variance)         ********************

             1         2         3         4         5         6
         6.03E-01  9.20E-01  9.78E-01  1.01E+00  1.12E+00  1.37E+00
 #TBLN:      7
 #METH: Importance Sampling of Variance-Covariance (SIR)

 #TERM:
 STATISTICAL PORTION WAS COMPLETED

 TOTAL DATA POINTS NORMALLY DISTRIBUTED (N):         2184
 N*LOG(2PI) CONSTANT TO OBJECTIVE FUNCTION:    4013.9235130380102
 OBJECTIVE FUNCTION VALUE WITHOUT CONSTANT:   -450.82693374360412
 OBJECTIVE FUNCTION VALUE WITH CONSTANT:       3563.0965792944062
 REPORTED OBJECTIVE FUNCTION DOES NOT CONTAIN CONSTANT

 TOTAL EFFECTIVE ETAS (NIND*NETA):                           336
 NIND*NETA*LOG(2PI) CONSTANT TO OBJECTIVE FUNCTION:    617.52669431354002
 OBJECTIVE FUNCTION VALUE WITHOUT CONSTANT:   -450.82693374360412
 OBJECTIVE FUNCTION VALUE WITH CONSTANT:       166.69976056993590
 REPORTED OBJECTIVE FUNCTION DOES NOT CONTAIN CONSTANT


 #TERE:
 Elapsed estimation  time in seconds:     6.02
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 #OBJV:********************************************          -450.827       *********************************************
 #OBJS:********************************************             4.403 (STD) *********************************************

 ********************                 IMPORTANCE SAMPLING OF VARIANCE-COVARIANCE (SIR)               ********************
 ********************                             FINAL PARAMETER ESTIMATE                           ********************

 THETA - VECTOR OF FIXED EFFECTS PARAMETERS   *********
         TH 1      TH 2      TH 3
         4.72E-01  1.09E+01  9.29E+01

 OMEGA - COV MATRIX FOR RANDOM EFFECTS - ETAS  ********
         ETA_V     ETA_CL
 ETA_V
+        2.54E-01
 ETA_CL
+        0.00E+00  1.43E-01

 SIGMA - COV MATRIX FOR RANDOM EFFECTS - EPSILONS  ****
         EPS1
 EPS1
+        1.72E-01

 OMEGA - CORR MATRIX FOR RANDOM EFFECTS - ETAS  *******
         ETA_V     ETA_CL
 ETA_V
+        5.03E-01
 ETA_CL
+        0.00E+00  3.77E-01

 SIGMA - CORR MATRIX FOR RANDOM EFFECTS - EPSILONS  ***
         EPS1
 EPS1
+        4.14E-01

 ********************                 IMPORTANCE SAMPLING OF VARIANCE-COVARIANCE (SIR)               ********************
 ********************                STANDARD ERROR OF ESTIMATE (From Sample Variance)               ********************

 THETA - VECTOR OF FIXED EFFECTS PARAMETERS   *********
         TH 1      TH 2      TH 3
         1.07E-02  3.67E-01  4.04E+00

 OMEGA - COV MATRIX FOR RANDOM EFFECTS - ETAS  ********
         ETA_V     ETA_CL
 ETA_V
+        2.86E-02
 ETA_CL
+        0.00E+00  1.96E-02

 SIGMA - COV MATRIX FOR RANDOM EFFECTS - EPSILONS  ****
         EPS1
 EPS1
+        5.50E-03

 OMEGA - CORR MATRIX FOR RANDOM EFFECTS - ETAS  *******
         ETA_V     ETA_CL
 ETA_V
+        2.81E-02
 ETA_CL
+        0.00E+00  2.55E-02

 SIGMA - CORR MATRIX FOR RANDOM EFFECTS - EPSILONS  ***
         EPS1
 EPS1
+        6.63E-03

 ********************                 IMPORTANCE SAMPLING OF VARIANCE-COVARIANCE (SIR)               ********************
 ********************               COVARIANCE MATRIX OF ESTIMATE (From Sample Variance)             ********************

            TH 1      TH 2      TH 3      OM11      OM12      OM22      SG11
 TH 1
+        1.14E-04
 TH 2
+       -1.30E-03  1.35E-01
 TH 3
+        9.29E-03  8.34E-02  1.63E+01
 OM11
+       -5.32E-05  3.03E-04 -2.04E-03  8.16E-04
 OM12
+       ......... ......... ......... ......... .........
 OM22
+        1.09E-06  1.25E-03  6.16E-03  9.61E-06  0.00E+00  3.83E-04
 SG11
+        8.17E-07  1.72E-04  2.75E-03 -4.24E-06  0.00E+00  6.29E-06  3.02E-05

 ********************                 IMPORTANCE SAMPLING OF VARIANCE-COVARIANCE (SIR)               ********************
 ********************              CORRELATION MATRIX OF ESTIMATE (From Sample Variance)             ********************

            TH 1      TH 2      TH 3      OM11      OM12      OM22      SG11
 TH 1
+        1.07E-02
 TH 2
+       -3.32E-01  3.67E-01
 TH 3
+        2.15E-01  5.62E-02  4.04E+00
 OM11
+       -1.74E-01  2.89E-02 -1.77E-02  2.86E-02
 OM12
+       ......... ......... ......... ......... .........
 OM22
+        5.22E-03  1.74E-01  7.78E-02  1.72E-02  0.00E+00  1.96E-02
 SG11
+        1.39E-02  8.55E-02  1.24E-01 -2.70E-02  0.00E+00  5.84E-02  5.50E-03
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
 ********************                 IMPORTANCE SAMPLING OF VARIANCE-COVARIANCE (SIR)               ********************
 ********************           EIGENVALUES OF COR MATRIX OF ESTIMATE (From Sample Variance)         ********************

             1         2         3         4         5         6
         5.43E-01  8.36E-01  9.41E-01  9.67E-01  1.27E+00  1.44E+00
 #TBLN:      8
 #METH: Importance Sampling of Variance-Covariance (SIR)

 #TERM:
 STATISTICAL PORTION WAS COMPLETED

 TOTAL DATA POINTS NORMALLY DISTRIBUTED (N):         2184
 N*LOG(2PI) CONSTANT TO OBJECTIVE FUNCTION:    4013.9235130380102
 OBJECTIVE FUNCTION VALUE WITHOUT CONSTANT:   -451.59338253037919
 OBJECTIVE FUNCTION VALUE WITH CONSTANT:       3562.3301305076311
 REPORTED OBJECTIVE FUNCTION DOES NOT CONTAIN CONSTANT

 TOTAL EFFECTIVE ETAS (NIND*NETA):                           336
 NIND*NETA*LOG(2PI) CONSTANT TO OBJECTIVE FUNCTION:    617.52669431354002
 OBJECTIVE FUNCTION VALUE WITHOUT CONSTANT:   -451.59338253037919
 OBJECTIVE FUNCTION VALUE WITH CONSTANT:       165.93331178316083
 REPORTED OBJECTIVE FUNCTION DOES NOT CONTAIN CONSTANT


 #TERE:
 Elapsed estimation  time in seconds:     6.07
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 #OBJV:********************************************          -451.593       *********************************************
 #OBJS:********************************************             3.311 (STD) *********************************************

 ********************                 IMPORTANCE SAMPLING OF VARIANCE-COVARIANCE (SIR)               ********************
 ********************                             FINAL PARAMETER ESTIMATE                           ********************

 THETA - VECTOR OF FIXED EFFECTS PARAMETERS   *********
         TH 1      TH 2      TH 3
         4.74E-01  1.09E+01  9.31E+01

 OMEGA - COV MATRIX FOR RANDOM EFFECTS - ETAS  ********
         ETA_V     ETA_CL
 ETA_V
+        2.57E-01
 ETA_CL
+        0.00E+00  1.39E-01

 SIGMA - COV MATRIX FOR RANDOM EFFECTS - EPSILONS  ****
         EPS1
 EPS1
+        1.72E-01

 OMEGA - CORR MATRIX FOR RANDOM EFFECTS - ETAS  *******
         ETA_V     ETA_CL
 ETA_V
+        5.06E-01
 ETA_CL
+        0.00E+00  3.72E-01

 SIGMA - CORR MATRIX FOR RANDOM EFFECTS - EPSILONS  ***
         EPS1
 EPS1
+        4.14E-01

 ********************                 IMPORTANCE SAMPLING OF VARIANCE-COVARIANCE (SIR)               ********************
 ********************                STANDARD ERROR OF ESTIMATE (From Sample Variance)               ********************

 THETA - VECTOR OF FIXED EFFECTS PARAMETERS   *********
         TH 1      TH 2      TH 3
         9.35E-03  3.32E-01  3.80E+00

 OMEGA - COV MATRIX FOR RANDOM EFFECTS - ETAS  ********
         ETA_V     ETA_CL
 ETA_V
+        2.85E-02
 ETA_CL
+        0.00E+00  1.74E-02

 SIGMA - COV MATRIX FOR RANDOM EFFECTS - EPSILONS  ****
         EPS1
 EPS1
+        5.31E-03

 OMEGA - CORR MATRIX FOR RANDOM EFFECTS - ETAS  *******
         ETA_V     ETA_CL
 ETA_V
+        2.82E-02
 ETA_CL
+        0.00E+00  2.32E-02

 SIGMA - CORR MATRIX FOR RANDOM EFFECTS - EPSILONS  ***
         EPS1
 EPS1
+        6.40E-03

 ********************                 IMPORTANCE SAMPLING OF VARIANCE-COVARIANCE (SIR)               ********************
 ********************               COVARIANCE MATRIX OF ESTIMATE (From Sample Variance)             ********************

            TH 1      TH 2      TH 3      OM11      OM12      OM22      SG11
 TH 1
+        8.74E-05
 TH 2
+       -5.09E-04  1.10E-01
 TH 3
+        8.34E-03 -3.60E-02  1.44E+01
 OM11
+        5.46E-06  6.85E-04  4.26E-03  8.12E-04
 OM12
+       ......... ......... ......... ......... .........
 OM22
+        1.34E-05  3.09E-04  3.18E-03 -2.62E-05  0.00E+00  3.04E-04
 SG11
+       -2.79E-07 -4.29E-05 -1.74E-03  7.06E-06  0.00E+00 -2.65E-06  2.82E-05

 ********************                 IMPORTANCE SAMPLING OF VARIANCE-COVARIANCE (SIR)               ********************
 ********************              CORRELATION MATRIX OF ESTIMATE (From Sample Variance)             ********************

            TH 1      TH 2      TH 3      OM11      OM12      OM22      SG11
 TH 1
+        9.35E-03
 TH 2
+       -1.64E-01  3.32E-01
 TH 3
+        2.35E-01 -2.85E-02  3.80E+00
 OM11
+        2.05E-02  7.24E-02  3.93E-02  2.85E-02
 OM12
+       ......... ......... ......... ......... .........
 OM22
+        8.20E-02  5.33E-02  4.79E-02 -5.27E-02  0.00E+00  1.74E-02
 SG11
+       -5.62E-03 -2.44E-02 -8.61E-02  4.66E-02  0.00E+00 -2.86E-02  5.31E-03
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
 ********************                 IMPORTANCE SAMPLING OF VARIANCE-COVARIANCE (SIR)               ********************
 ********************           EIGENVALUES OF COR MATRIX OF ESTIMATE (From Sample Variance)         ********************

             1         2         3         4         5         6
         7.09E-01  8.26E-01  9.86E-01  1.07E+00  1.09E+00  1.32E+00
 #TBLN:      9
 #METH: Importance Sampling of Variance-Covariance (SIR)

 #TERM:
 STATISTICAL PORTION WAS COMPLETED

 TOTAL DATA POINTS NORMALLY DISTRIBUTED (N):         2184
 N*LOG(2PI) CONSTANT TO OBJECTIVE FUNCTION:    4013.9235130380102
 OBJECTIVE FUNCTION VALUE WITHOUT CONSTANT:   -451.65688681032998
 OBJECTIVE FUNCTION VALUE WITH CONSTANT:       3562.2666262276803
 REPORTED OBJECTIVE FUNCTION DOES NOT CONTAIN CONSTANT

 TOTAL EFFECTIVE ETAS (NIND*NETA):                           336
 NIND*NETA*LOG(2PI) CONSTANT TO OBJECTIVE FUNCTION:    617.52669431354002
 OBJECTIVE FUNCTION VALUE WITHOUT CONSTANT:   -451.65688681032998
 OBJECTIVE FUNCTION VALUE WITH CONSTANT:       165.86980750321004
 REPORTED OBJECTIVE FUNCTION DOES NOT CONTAIN CONSTANT


 #TERE:
 Elapsed estimation  time in seconds:     6.10
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 #OBJV:********************************************          -451.657       *********************************************
 #OBJS:********************************************             3.220 (STD) *********************************************

 ********************                 IMPORTANCE SAMPLING OF VARIANCE-COVARIANCE (SIR)               ********************
 ********************                             FINAL PARAMETER ESTIMATE                           ********************

 THETA - VECTOR OF FIXED EFFECTS PARAMETERS   *********
         TH 1      TH 2      TH 3
         4.73E-01  1.09E+01  9.30E+01

 OMEGA - COV MATRIX FOR RANDOM EFFECTS - ETAS  ********
         ETA_V     ETA_CL
 ETA_V
+        2.53E-01
 ETA_CL
+        0.00E+00  1.40E-01

 SIGMA - COV MATRIX FOR RANDOM EFFECTS - EPSILONS  ****
         EPS1
 EPS1
+        1.73E-01

 OMEGA - CORR MATRIX FOR RANDOM EFFECTS - ETAS  *******
         ETA_V     ETA_CL
 ETA_V
+        5.02E-01
 ETA_CL
+        0.00E+00  3.73E-01

 SIGMA - CORR MATRIX FOR RANDOM EFFECTS - EPSILONS  ***
         EPS1
 EPS1
+        4.15E-01

 ********************                 IMPORTANCE SAMPLING OF VARIANCE-COVARIANCE (SIR)               ********************
 ********************                STANDARD ERROR OF ESTIMATE (From Sample Variance)               ********************

 THETA - VECTOR OF FIXED EFFECTS PARAMETERS   *********
         TH 1      TH 2      TH 3
         1.00E-02  3.31E-01  3.67E+00

 OMEGA - COV MATRIX FOR RANDOM EFFECTS - ETAS  ********
         ETA_V     ETA_CL
 ETA_V
+        2.81E-02
 ETA_CL
+        0.00E+00  1.67E-02

 SIGMA - COV MATRIX FOR RANDOM EFFECTS - EPSILONS  ****
         EPS1
 EPS1
+        5.49E-03

 OMEGA - CORR MATRIX FOR RANDOM EFFECTS - ETAS  *******
         ETA_V     ETA_CL
 ETA_V
+        2.78E-02
 ETA_CL
+        0.00E+00  2.24E-02

 SIGMA - CORR MATRIX FOR RANDOM EFFECTS - EPSILONS  ***
         EPS1
 EPS1
+        6.61E-03

 ********************                 IMPORTANCE SAMPLING OF VARIANCE-COVARIANCE (SIR)               ********************
 ********************               COVARIANCE MATRIX OF ESTIMATE (From Sample Variance)             ********************

            TH 1      TH 2      TH 3      OM11      OM12      OM22      SG11
 TH 1
+        1.00E-04
 TH 2
+       -4.45E-04  1.09E-01
 TH 3
+        1.10E-02 -2.93E-02  1.34E+01
 OM11
+       -2.79E-05  6.17E-04  1.83E-03  7.89E-04
 OM12
+       ......... ......... ......... ......... .........
 OM22
+       -1.07E-05  1.42E-04  1.53E-03  5.50E-06  0.00E+00  2.80E-04
 SG11
+        4.98E-06 -3.94E-05  1.06E-03  1.80E-06  0.00E+00 -8.06E-06  3.02E-05

 ********************                 IMPORTANCE SAMPLING OF VARIANCE-COVARIANCE (SIR)               ********************
 ********************              CORRELATION MATRIX OF ESTIMATE (From Sample Variance)             ********************

            TH 1      TH 2      TH 3      OM11      OM12      OM22      SG11
 TH 1
+        1.00E-02
 TH 2
+       -1.34E-01  3.31E-01
 TH 3
+        3.01E-01 -2.42E-02  3.67E+00
 OM11
+       -9.93E-02  6.64E-02  1.78E-02  2.81E-02
 OM12
+       ......... ......... ......... ......... .........
 OM22
+       -6.38E-02  2.56E-02  2.50E-02  1.17E-02  0.00E+00  1.67E-02
 SG11
+        9.06E-02 -2.17E-02  5.26E-02  1.17E-02  0.00E+00 -8.77E-02  5.49E-03
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
 ********************                 IMPORTANCE SAMPLING OF VARIANCE-COVARIANCE (SIR)               ********************
 ********************           EIGENVALUES OF COR MATRIX OF ESTIMATE (From Sample Variance)         ********************

             1         2         3         4         5         6
         6.55E-01  8.98E-01  9.27E-01  1.06E+00  1.07E+00  1.39E+00
 #TBLN:     10
 #METH: Importance Sampling of Variance-Covariance (SIR)

 #TERM:
 STATISTICAL PORTION WAS COMPLETED

 TOTAL DATA POINTS NORMALLY DISTRIBUTED (N):         2184
 N*LOG(2PI) CONSTANT TO OBJECTIVE FUNCTION:    4013.9235130380102
 OBJECTIVE FUNCTION VALUE WITHOUT CONSTANT:   -451.75423389195180
 OBJECTIVE FUNCTION VALUE WITH CONSTANT:       3562.1692791460582
 REPORTED OBJECTIVE FUNCTION DOES NOT CONTAIN CONSTANT

 TOTAL EFFECTIVE ETAS (NIND*NETA):                           336
 NIND*NETA*LOG(2PI) CONSTANT TO OBJECTIVE FUNCTION:    617.52669431354002
 OBJECTIVE FUNCTION VALUE WITHOUT CONSTANT:   -451.75423389195180
 OBJECTIVE FUNCTION VALUE WITH CONSTANT:       165.77246042158822
 REPORTED OBJECTIVE FUNCTION DOES NOT CONTAIN CONSTANT


 #TERE:
 Elapsed estimation  time in seconds:     6.07
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 #OBJV:********************************************          -451.754       *********************************************
 #OBJS:********************************************             3.154 (STD) *********************************************

 ********************                 IMPORTANCE SAMPLING OF VARIANCE-COVARIANCE (SIR)               ********************
 ********************                             FINAL PARAMETER ESTIMATE                           ********************

 THETA - VECTOR OF FIXED EFFECTS PARAMETERS   *********
         TH 1      TH 2      TH 3
         4.73E-01  1.09E+01  9.25E+01

 OMEGA - COV MATRIX FOR RANDOM EFFECTS - ETAS  ********
         ETA_V     ETA_CL
 ETA_V
+        2.54E-01
 ETA_CL
+        0.00E+00  1.41E-01

 SIGMA - COV MATRIX FOR RANDOM EFFECTS - EPSILONS  ****
         EPS1
 EPS1
+        1.72E-01

 OMEGA - CORR MATRIX FOR RANDOM EFFECTS - ETAS  *******
         ETA_V     ETA_CL
 ETA_V
+        5.03E-01
 ETA_CL
+        0.00E+00  3.75E-01

 SIGMA - CORR MATRIX FOR RANDOM EFFECTS - EPSILONS  ***
         EPS1
 EPS1
+        4.15E-01

 ********************                 IMPORTANCE SAMPLING OF VARIANCE-COVARIANCE (SIR)               ********************
 ********************                STANDARD ERROR OF ESTIMATE (From Sample Variance)               ********************

 THETA - VECTOR OF FIXED EFFECTS PARAMETERS   *********
         TH 1      TH 2      TH 3
         9.17E-03  3.21E-01  3.59E+00

 OMEGA - COV MATRIX FOR RANDOM EFFECTS - ETAS  ********
         ETA_V     ETA_CL
 ETA_V
+        3.02E-02
 ETA_CL
+        0.00E+00  1.78E-02

 SIGMA - COV MATRIX FOR RANDOM EFFECTS - EPSILONS  ****
         EPS1
 EPS1
+        5.38E-03

 OMEGA - CORR MATRIX FOR RANDOM EFFECTS - ETAS  *******
         ETA_V     ETA_CL
 ETA_V
+        2.96E-02
 ETA_CL
+        0.00E+00  2.35E-02

 SIGMA - CORR MATRIX FOR RANDOM EFFECTS - EPSILONS  ***
         EPS1
 EPS1
+        6.47E-03

 ********************                 IMPORTANCE SAMPLING OF VARIANCE-COVARIANCE (SIR)               ********************
 ********************               COVARIANCE MATRIX OF ESTIMATE (From Sample Variance)             ********************

            TH 1      TH 2      TH 3      OM11      OM12      OM22      SG11
 TH 1
+        8.41E-05
 TH 2
+       -3.03E-04  1.03E-01
 TH 3
+        1.01E-02  4.78E-02  1.29E+01
 OM11
+       -7.73E-06  2.50E-04  2.90E-03  9.14E-04
 OM12
+       ......... ......... ......... ......... .........
 OM22
+        1.12E-06  7.01E-05 -6.71E-04 -6.25E-06  0.00E+00  3.16E-04
 SG11
+        4.73E-08 -1.85E-06  1.67E-03 -5.31E-06  0.00E+00 -2.50E-06  2.90E-05

 ********************                 IMPORTANCE SAMPLING OF VARIANCE-COVARIANCE (SIR)               ********************
 ********************              CORRELATION MATRIX OF ESTIMATE (From Sample Variance)             ********************

            TH 1      TH 2      TH 3      OM11      OM12      OM22      SG11
 TH 1
+        9.17E-03
 TH 2
+       -1.03E-01  3.21E-01
 TH 3
+        3.06E-01  4.14E-02  3.59E+00
 OM11
+       -2.79E-02  2.57E-02  2.67E-02  3.02E-02
 OM12
+       ......... ......... ......... ......... .........
 OM22
+        6.87E-03  1.23E-02 -1.05E-02 -1.16E-02  0.00E+00  1.78E-02
 SG11
+        9.59E-04 -1.07E-03  8.62E-02 -3.26E-02  0.00E+00 -2.61E-02  5.38E-03
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
 ********************                 IMPORTANCE SAMPLING OF VARIANCE-COVARIANCE (SIR)               ********************
 ********************           EIGENVALUES OF COR MATRIX OF ESTIMATE (From Sample Variance)         ********************

             1         2         3         4         5         6
         6.49E-01  9.38E-01  1.01E+00  1.03E+00  1.05E+00  1.32E+00
 #TBLN:     11
 #METH: Importance Sampling of Variance-Covariance (SIR)

 #TERM:
 STATISTICAL PORTION WAS COMPLETED

 TOTAL DATA POINTS NORMALLY DISTRIBUTED (N):         2184
 N*LOG(2PI) CONSTANT TO OBJECTIVE FUNCTION:    4013.9235130380102
 OBJECTIVE FUNCTION VALUE WITHOUT CONSTANT:   -451.57797840807314
 OBJECTIVE FUNCTION VALUE WITH CONSTANT:       3562.3455346299370
 REPORTED OBJECTIVE FUNCTION DOES NOT CONTAIN CONSTANT

 TOTAL EFFECTIVE ETAS (NIND*NETA):                           336
 NIND*NETA*LOG(2PI) CONSTANT TO OBJECTIVE FUNCTION:    617.52669431354002
 OBJECTIVE FUNCTION VALUE WITHOUT CONSTANT:   -451.57797840807314
 OBJECTIVE FUNCTION VALUE WITH CONSTANT:       165.94871590546688
 REPORTED OBJECTIVE FUNCTION DOES NOT CONTAIN CONSTANT


 #TERE:
 Elapsed estimation  time in seconds:     6.07
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 #OBJV:********************************************          -451.578       *********************************************
 #OBJS:********************************************             3.511 (STD) *********************************************

 ********************                 IMPORTANCE SAMPLING OF VARIANCE-COVARIANCE (SIR)               ********************
 ********************                             FINAL PARAMETER ESTIMATE                           ********************

 THETA - VECTOR OF FIXED EFFECTS PARAMETERS   *********
         TH 1      TH 2      TH 3
         4.72E-01  1.09E+01  9.23E+01

 OMEGA - COV MATRIX FOR RANDOM EFFECTS - ETAS  ********
         ETA_V     ETA_CL
 ETA_V
+        2.56E-01
 ETA_CL
+        0.00E+00  1.39E-01

 SIGMA - COV MATRIX FOR RANDOM EFFECTS - EPSILONS  ****
         EPS1
 EPS1
+        1.72E-01

 OMEGA - CORR MATRIX FOR RANDOM EFFECTS - ETAS  *******
         ETA_V     ETA_CL
 ETA_V
+        5.05E-01
 ETA_CL
+        0.00E+00  3.73E-01

 SIGMA - CORR MATRIX FOR RANDOM EFFECTS - EPSILONS  ***
         EPS1
 EPS1
+        4.14E-01

 ********************                 IMPORTANCE SAMPLING OF VARIANCE-COVARIANCE (SIR)               ********************
 ********************                STANDARD ERROR OF ESTIMATE (From Sample Variance)               ********************

 THETA - VECTOR OF FIXED EFFECTS PARAMETERS   *********
         TH 1      TH 2      TH 3
         1.01E-02  3.26E-01  3.80E+00

 OMEGA - COV MATRIX FOR RANDOM EFFECTS - ETAS  ********
         ETA_V     ETA_CL
 ETA_V
+        3.03E-02
 ETA_CL
+        0.00E+00  1.72E-02

 SIGMA - COV MATRIX FOR RANDOM EFFECTS - EPSILONS  ****
         EPS1
 EPS1
+        5.21E-03

 OMEGA - CORR MATRIX FOR RANDOM EFFECTS - ETAS  *******
         ETA_V     ETA_CL
 ETA_V
+        2.98E-02
 ETA_CL
+        0.00E+00  2.30E-02

 SIGMA - CORR MATRIX FOR RANDOM EFFECTS - EPSILONS  ***
         EPS1
 EPS1
+        6.28E-03

 ********************                 IMPORTANCE SAMPLING OF VARIANCE-COVARIANCE (SIR)               ********************
 ********************               COVARIANCE MATRIX OF ESTIMATE (From Sample Variance)             ********************

            TH 1      TH 2      TH 3      OM11      OM12      OM22      SG11
 TH 1
+        1.03E-04
 TH 2
+       -7.19E-04  1.07E-01
 TH 3
+        1.45E-02 -6.98E-02  1.44E+01
 OM11
+       -5.76E-05  3.09E-04 -8.01E-03  9.20E-04
 OM12
+       ......... ......... ......... ......... .........
 OM22
+        7.85E-06  2.92E-05 -2.45E-03  1.36E-05  0.00E+00  2.97E-04
 SG11
+        5.99E-06  9.18E-05  1.58E-04 -1.23E-05  0.00E+00 -3.00E-06  2.72E-05

 ********************                 IMPORTANCE SAMPLING OF VARIANCE-COVARIANCE (SIR)               ********************
 ********************              CORRELATION MATRIX OF ESTIMATE (From Sample Variance)             ********************

            TH 1      TH 2      TH 3      OM11      OM12      OM22      SG11
 TH 1
+        1.01E-02
 TH 2
+       -2.17E-01  3.26E-01
 TH 3
+        3.77E-01 -5.63E-02  3.80E+00
 OM11
+       -1.87E-01  3.12E-02 -6.95E-02  3.03E-02
 OM12
+       ......... ......... ......... ......... .........
 OM22
+        4.49E-02  5.20E-03 -3.74E-02  2.60E-02  0.00E+00  1.72E-02
 SG11
+        1.13E-01  5.39E-02  7.96E-03 -7.79E-02  0.00E+00 -3.34E-02  5.21E-03
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
 ********************                 IMPORTANCE SAMPLING OF VARIANCE-COVARIANCE (SIR)               ********************
 ********************           EIGENVALUES OF COR MATRIX OF ESTIMATE (From Sample Variance)         ********************

             1         2         3         4         5         6
         5.46E-01  8.96E-01  9.35E-01  9.99E-01  1.09E+00  1.54E+00
 #CPUT: Total CPU Time in Seconds,       66.915
